// SBML level 2 version 4

model simpleExample()
  // simpleExample

  // Compartments:
  compartment Cell_1 = 1;
  compartment Cell_2 = 1;

  // Species:
  species x_Cell_1 in Cell_1 = 10;
  species y_Cell_1 in Cell_1 = 1;
  species x_Cell_2 in Cell_2 = 10;
  species y_Cell_2 in Cell_2 = 1;

  // Reactions:
  Reaction_1: x_Cell_1 => x_Cell_1; Reaction_1_a*(x_Cell_1 - Reaction_1_x0);
    Reaction_1_a = 0.5; Reaction_1_x0 = 2;
  Reaction_2: y_Cell_1 => y_Cell_1; Reaction_2_a*(y_Cell_1 - Reaction_2_y0);
    Reaction_2_a = 0.5; Reaction_2_y0 = 2;
  Reaction_3: x_Cell_1 => y_Cell_1; Reaction_3_beta*(x_Cell_1 - y_Cell_1);
    Reaction_3_beta = 1;
  Reaction_4: y_Cell_1 => x_Cell_1; Reaction_4_beta*(y_Cell_1 - x_Cell_1);
    Reaction_4_beta = 1;
  Reaction_6: x_Cell_2 => x_Cell_2; Reaction_6_a*(x_Cell_2 - Reaction_6_x0);
    Reaction_6_a = 0.5; Reaction_6_x0 = 2;
  Reaction_7: y_Cell_2 => y_Cell_2; Reaction_7_a*(y_Cell_2 - Reaction_7_y0);
    Reaction_7_a = 0.5; Reaction_7_y0 = 2;
  Reaction_8: x_Cell_2 => y_Cell_2; Reaction_8_beta*(x_Cell_2 - y_Cell_2);
    Reaction_8_beta = 1;
  Reaction_9: y_Cell_2 => x_Cell_2; Reaction_9_beta*(y_Cell_2 - x_Cell_2);
    Reaction_9_beta = 1;
end
